new PV.39e13b224b Irradiance=1.0 pf=1.0 RegisterNames=['kWh', 'kvarh', 'Max kW', 'Max kVA', 'Hours', 'Price($)'] RegisterValues=[0.0, 0.0, 0.0, 0.0, 0.0, 0.0] Idx=1 kVARated=50.0 IrradianceNow=1.0 Pmpp=50.0 daily= duty= yearly=pvshape_7 Tdaily= Tduty= Tyearly=constant_temperature bus=b01eb31039 kW=49.825454141567356 kvar=0.0 ;
new PV.d54162d0e8 Irradiance=1.0 pf=1.0 RegisterNames=['kWh', 'kvarh', 'Max kW', 'Max kVA', 'Hours', 'Price($)'] RegisterValues=[0.0, 0.0, 0.0, 0.0, 0.0, 0.0] Idx=2 kVARated=50.0 IrradianceNow=1.0 Pmpp=50.0 daily= duty= yearly=pvshape_29 Tdaily= Tduty= Tyearly=constant_temperature bus=cd9837dae0 kW=52.131119547638946 kvar=0.0 ;
new PV.39010d9c7f Irradiance=1.0 pf=1.0 RegisterNames=['kWh', 'kvarh', 'Max kW', 'Max kVA', 'Hours', 'Price($)'] RegisterValues=[0.0, 0.0, 0.0, 0.0, 0.0, 0.0] Idx=3 kVARated=50.0 IrradianceNow=1.0 Pmpp=50.0 daily= duty= yearly=pvshape_49 Tdaily= Tduty= Tyearly=constant_temperature bus=5cebec11bd kW=49.53422611476091 kvar=0.0 ;
new PV.630dab041e Irradiance=1.0 pf=1.0 RegisterNames=['kWh', 'kvarh', 'Max kW', 'Max kVA', 'Hours', 'Price($)'] RegisterValues=[0.0, 0.0, 0.0, 0.0, 0.0, 0.0] Idx=4 kVARated=50.0 IrradianceNow=1.0 Pmpp=50.0 daily= duty= yearly=pvshape_55 Tdaily= Tduty= Tyearly=constant_temperature bus=b82c23fd96 kW=51.22434548387395 kvar=0.0 ;
new PV.8eb813fb86 Irradiance=1.0 pf=1.0 RegisterNames=['kWh', 'kvarh', 'Max kW', 'Max kVA', 'Hours', 'Price($)'] RegisterValues=[0.0, 0.0, 0.0, 0.0, 0.0, 0.0] Idx=5 kVARated=50.0 IrradianceNow=1.0 Pmpp=50.0 daily= duty= yearly=pvshape_63 Tdaily= Tduty= Tyearly=constant_temperature bus=8b8807c56d kW=49.65396705172605 kvar=0.0 ;
new PV.61c8b9d3cc Irradiance=1.0 pf=1.0 RegisterNames=['kWh', 'kvarh', 'Max kW', 'Max kVA', 'Hours', 'Price($)'] RegisterValues=[0.0, 0.0, 0.0, 0.0, 0.0, 0.0] Idx=6 kVARated=50.0 IrradianceNow=1.0 Pmpp=50.0 daily= duty= yearly=pvshape_68 Tdaily= Tduty= Tyearly=constant_temperature bus=e355a171aa kW=48.04698458875038 kvar=0.0 ;
new PV.3a85e55e76 Irradiance=1.0 pf=1.0 RegisterNames=['kWh', 'kvarh', 'Max kW', 'Max kVA', 'Hours', 'Price($)'] RegisterValues=[0.0, 0.0, 0.0, 0.0, 0.0, 0.0] Idx=7 kVARated=50.0 IrradianceNow=1.0 Pmpp=50.0 daily= duty= yearly=pvshape_80 Tdaily= Tduty= Tyearly=constant_temperature bus=4769aa0a35 kW=51.826062987098894 kvar=0.0 ;
new PV.8e8836650c Irradiance=1.0 pf=1.0 RegisterNames=['kWh', 'kvarh', 'Max kW', 'Max kVA', 'Hours', 'Price($)'] RegisterValues=[0.0, 0.0, 0.0, 0.0, 0.0, 0.0] Idx=8 kVARated=50.0 IrradianceNow=1.0 Pmpp=50.0 daily= duty= yearly=pvshape_87 Tdaily= Tduty= Tyearly=constant_temperature bus=a22e2dde28 kW=47.78204644319806 kvar=0.0 ;
new PV.1d6adaf338 Irradiance=1.0 pf=1.0 RegisterNames=['kWh', 'kvarh', 'Max kW', 'Max kVA', 'Hours', 'Price($)'] RegisterValues=[0.0, 0.0, 0.0, 0.0, 0.0, 0.0] Idx=9 kVARated=50.0 IrradianceNow=1.0 Pmpp=50.0 daily= duty= yearly=pvshape_113 Tdaily= Tduty= Tyearly=constant_temperature bus=a48475b00a kW=50.32969944072727 kvar=0.0 ;
