new PV.defeb98acc Irradiance=1.0 pf=1.0 RegisterNames=['kWh', 'kvarh', 'Max kW', 'Max kVA', 'Hours', 'Price($)'] RegisterValues=[0.0, 0.0, 0.0, 0.0, 0.0, 0.0] Idx=1 kVARated=50.0 IrradianceNow=1.0 Pmpp=50.0 daily= duty= yearly=pvshape_7 Tdaily= Tduty= Tyearly=constant_temperature bus=b8843e133d kW=48.10403627535295 kvar=0.0 ;
new PV.c477312b40 Irradiance=1.0 pf=1.0 RegisterNames=['kWh', 'kvarh', 'Max kW', 'Max kVA', 'Hours', 'Price($)'] RegisterValues=[0.0, 0.0, 0.0, 0.0, 0.0, 0.0] Idx=2 kVARated=50.0 IrradianceNow=1.0 Pmpp=50.0 daily= duty= yearly=pvshape_29 Tdaily= Tduty= Tyearly=constant_temperature bus=c03a9619d2 kW=52.32434207561081 kvar=0.0 ;
new PV.39e13b224b Irradiance=1.0 pf=1.0 RegisterNames=['kWh', 'kvarh', 'Max kW', 'Max kVA', 'Hours', 'Price($)'] RegisterValues=[0.0, 0.0, 0.0, 0.0, 0.0, 0.0] Idx=3 kVARated=50.0 IrradianceNow=1.0 Pmpp=50.0 daily= duty= yearly=pvshape_49 Tdaily= Tduty= Tyearly=constant_temperature bus=724b218002 kW=47.818694063875 kvar=0.0 ;
new PV.760b7474d3 Irradiance=1.0 pf=1.0 RegisterNames=['kWh', 'kvarh', 'Max kW', 'Max kVA', 'Hours', 'Price($)'] RegisterValues=[0.0, 0.0, 0.0, 0.0, 0.0, 0.0] Idx=4 kVARated=50.0 IrradianceNow=1.0 Pmpp=50.0 daily= duty= yearly=pvshape_55 Tdaily= Tduty= Tyearly=constant_temperature bus=61ad209a59 kW=51.82736417601628 kvar=0.0 ;
new PV.0df790b72d Irradiance=1.0 pf=1.0 RegisterNames=['kWh', 'kvarh', 'Max kW', 'Max kVA', 'Hours', 'Price($)'] RegisterValues=[0.0, 0.0, 0.0, 0.0, 0.0, 0.0] Idx=5 kVARated=50.0 IrradianceNow=1.0 Pmpp=50.0 daily= duty= yearly=pvshape_63 Tdaily= Tduty= Tyearly=constant_temperature bus=0d60817693 kW=51.6094663734034 kvar=0.0 ;
new PV.a1b84785c8 Irradiance=1.0 pf=1.0 RegisterNames=['kWh', 'kvarh', 'Max kW', 'Max kVA', 'Hours', 'Price($)'] RegisterValues=[0.0, 0.0, 0.0, 0.0, 0.0, 0.0] Idx=6 kVARated=50.0 IrradianceNow=1.0 Pmpp=50.0 daily= duty= yearly=pvshape_68 Tdaily= Tduty= Tyearly=constant_temperature bus=1a650842ae kW=51.1338837657199 kvar=0.0 ;
new PV.8ff5ae8811 Irradiance=1.0 pf=1.0 RegisterNames=['kWh', 'kvarh', 'Max kW', 'Max kVA', 'Hours', 'Price($)'] RegisterValues=[0.0, 0.0, 0.0, 0.0, 0.0, 0.0] Idx=7 kVARated=50.0 IrradianceNow=1.0 Pmpp=50.0 daily= duty= yearly=pvshape_80 Tdaily= Tduty= Tyearly=constant_temperature bus=573ea483c4 kW=51.73204699695577 kvar=0.0 ;
new PV.27340f2ebf Irradiance=1.0 pf=1.0 RegisterNames=['kWh', 'kvarh', 'Max kW', 'Max kVA', 'Hours', 'Price($)'] RegisterValues=[0.0, 0.0, 0.0, 0.0, 0.0, 0.0] Idx=8 kVARated=50.0 IrradianceNow=1.0 Pmpp=50.0 daily= duty= yearly=pvshape_87 Tdaily= Tduty= Tyearly=constant_temperature bus=d9a1fcc6f2 kW=49.79985516760874 kvar=0.0 ;
new PV.e3d2a85c12 Irradiance=1.0 pf=1.0 RegisterNames=['kWh', 'kvarh', 'Max kW', 'Max kVA', 'Hours', 'Price($)'] RegisterValues=[0.0, 0.0, 0.0, 0.0, 0.0, 0.0] Idx=9 kVARated=50.0 IrradianceNow=1.0 Pmpp=50.0 daily= duty= yearly=pvshape_113 Tdaily= Tduty= Tyearly=constant_temperature bus=c20314147d kW=51.28843914574631 kvar=0.0 ;
