new PV.4105c2c70f Irradiance=1.0 pf=1.0 RegisterNames=['kWh', 'kvarh', 'Max kW', 'Max kVA', 'Hours', 'Price($)'] RegisterValues=[0.0, 0.0, 0.0, 0.0, 0.0, 0.0] Idx=1 kVARated=50.0 IrradianceNow=1.0 Pmpp=50.0 daily= duty= yearly=pvshape_7 Tdaily= Tduty= Tyearly=constant_temperature bus=dd2aa73f5e kW=52.197839335597564 kvar=0.0 ;
new PV.da8bc7963e Irradiance=1.0 pf=1.0 RegisterNames=['kWh', 'kvarh', 'Max kW', 'Max kVA', 'Hours', 'Price($)'] RegisterValues=[0.0, 0.0, 0.0, 0.0, 0.0, 0.0] Idx=2 kVARated=50.0 IrradianceNow=1.0 Pmpp=50.0 daily= duty= yearly=pvshape_29 Tdaily= Tduty= Tyearly=constant_temperature bus=2e90d8f429 kW=49.92684223053537 kvar=0.0 ;
new PV.3169191cdb Irradiance=1.0 pf=1.0 RegisterNames=['kWh', 'kvarh', 'Max kW', 'Max kVA', 'Hours', 'Price($)'] RegisterValues=[0.0, 0.0, 0.0, 0.0, 0.0, 0.0] Idx=3 kVARated=50.0 IrradianceNow=1.0 Pmpp=50.0 daily= duty= yearly=pvshape_49 Tdaily= Tduty= Tyearly=constant_temperature bus=29d27adc24 kW=50.287537862130684 kvar=0.0 ;
new PV.ec9a46f272 Irradiance=1.0 pf=1.0 RegisterNames=['kWh', 'kvarh', 'Max kW', 'Max kVA', 'Hours', 'Price($)'] RegisterValues=[0.0, 0.0, 0.0, 0.0, 0.0, 0.0] Idx=4 kVARated=50.0 IrradianceNow=1.0 Pmpp=50.0 daily= duty= yearly=pvshape_55 Tdaily= Tduty= Tyearly=constant_temperature bus=a6127a5355 kW=50.54999612168686 kvar=0.0 ;
new PV.78b54c2aec Irradiance=1.0 pf=1.0 RegisterNames=['kWh', 'kvarh', 'Max kW', 'Max kVA', 'Hours', 'Price($)'] RegisterValues=[0.0, 0.0, 0.0, 0.0, 0.0, 0.0] Idx=5 kVARated=50.0 IrradianceNow=1.0 Pmpp=50.0 daily= duty= yearly=pvshape_63 Tdaily= Tduty= Tyearly=constant_temperature bus=78dcbf8e33 kW=51.704528458246 kvar=0.0 ;
new PV.3154e90bb0 Irradiance=1.0 pf=1.0 RegisterNames=['kWh', 'kvarh', 'Max kW', 'Max kVA', 'Hours', 'Price($)'] RegisterValues=[0.0, 0.0, 0.0, 0.0, 0.0, 0.0] Idx=6 kVARated=50.0 IrradianceNow=1.0 Pmpp=50.0 daily= duty= yearly=pvshape_68 Tdaily= Tduty= Tyearly=constant_temperature bus=c7b7f5dd61 kW=52.22673315335604 kvar=0.0 ;
new PV.12b3f776ed Irradiance=1.0 pf=1.0 RegisterNames=['kWh', 'kvarh', 'Max kW', 'Max kVA', 'Hours', 'Price($)'] RegisterValues=[0.0, 0.0, 0.0, 0.0, 0.0, 0.0] Idx=7 kVARated=50.0 IrradianceNow=1.0 Pmpp=50.0 daily= duty= yearly=pvshape_80 Tdaily= Tduty= Tyearly=constant_temperature bus=1a650842ae kW=49.38642334524612 kvar=0.0 ;
new PV.ee92f350c5 Irradiance=1.0 pf=1.0 RegisterNames=['kWh', 'kvarh', 'Max kW', 'Max kVA', 'Hours', 'Price($)'] RegisterValues=[0.0, 0.0, 0.0, 0.0, 0.0, 0.0] Idx=8 kVARated=50.0 IrradianceNow=1.0 Pmpp=50.0 daily= duty= yearly=pvshape_87 Tdaily= Tduty= Tyearly=constant_temperature bus=bd90054045 kW=49.13908143693556 kvar=0.0 ;
new PV.abca37fa22 Irradiance=1.0 pf=1.0 RegisterNames=['kWh', 'kvarh', 'Max kW', 'Max kVA', 'Hours', 'Price($)'] RegisterValues=[0.0, 0.0, 0.0, 0.0, 0.0, 0.0] Idx=9 kVARated=50.0 IrradianceNow=1.0 Pmpp=50.0 daily= duty= yearly=pvshape_113 Tdaily= Tduty= Tyearly=constant_temperature bus=050fc1b7d1 kW=52.02232598625773 kvar=0.0 ;
